# AguaClara Water Treatment Plants
# Automated Design
# Add variable descriptions next to every varible so it is easy to interpret what this all means.
# Design References
# [reference: BasicInputs.xmcd]
# Use BasicClientInputs and ExpertClientInputs when this is run by LabVIEW.
# Use BasicInputs and ExpertInputs to use the program in MathCAD
# Change the reference by
# - right clicking
# - select properties
# - reference tab
# - type in the correct file name
# [reference: ExpertInputs.xmcd]
B_SedPlateFramePipes = 0.3 m
# [reference: DesignAssumptions.xmcd]
# [reference: MathFunctions.xmcd]
# [reference: PipeDatabase.xmcd]
Q_Plant = 12 L/s
# [reference: MinorLossCoefficients.xmcd]
# [reference: FluidsFunctions.xmcd]
# [reference: Sedimentation Tank.xmcd]
# [reference: Flocculator.xmcd]
# [reference: Rapid Mix.xmcd]
# [reference: LFOM.xmcd]
# [reference: EntranceTankDim.xmcd]
# [reference: Chemical Doser temp.xmcd]
# [reference: ChemStorageCylinders.xmcd]
# [reference: Materials List.xmcd]
W_SedBay = 1.08 m
N_SedTanks = 4
W_ExitChannelMin = 0.2032 m
W_SedBay = 1.08 m
N_SedBays = 1
# Sed Tanks and Slopes:
Geom_ExitChannel = 1
N_SedTanks = 4
H_SedBetween = 0 cm  # Distance from the top of the inlet manifold to the bottom of the ledge supporting the lamella frame
L_Sed = 3.83048 m
N_SedBays = 1  # Number of bays of inlet manifolds in each sed tank
# Length of the port through which water exits the inlet manifold
# Width of ferrous cement plates in whice one manifold port is cut
Q_SedBay = 3 L/s
# Sedimentation Tank Sludge Drain:
N_SedSludgeOrifices = 38  # per cell
Ti_SludgeDrain = 30 min  # Tank Drain time
W_SedSludge = 9.14557 cm  # Width of the sludge channel
B_SedSludgeOrifices = 10 cm  # Distance center to center between drain orifices
H_SedSludge = 4.57279 cm  # Depth of the sludge channel
T_SedSludge = 5 cm
T_SedSludge = 5 cm
# Thickness of the plate topping the sludge channel
# through which drain holes are formed
W_SedDrainCover = 19.1456 cm
D_SedSludgeOrifice = 0.009 m  # Diameter of drain orifices
W_SedInletBottom = 0.444272 m
N_SedSludgeOrifices = 38
ND_SedSludgeValve = 3 in
# Sedimentation Tank Dimensions:
Z_SedSludge = 0.0957279 m  # Height from 0 of the top of the sludge drain
Z_SedSlopes = 0.821929 m  # Height from 0 of the top of the inlet manifold
W_Sed = 1.08 m  # Total tank wall height
L_Sed = 3.83048 m  # Total tank length
# Inlet Channel:
HW_InletChannel = 0.255898 m  # Width of the drop chimneys connecting channel to sed inlet manifolds
W_InletChannel = 0.41787 m  # length of drop chimmneys
L_Channel = 5.07 m
N_SedInletPipes = 2  # per sed bay
H_InletChannel = 0.355898 m
# Sedimentation Tank Effluent Launder:
N_SedLaunderOrifices = 44  # Number of orifices per launder
Q_SedLaunderOrifices = 7.12515e-5 m^3/s  # More Launder Dimensions
ND_SedLaunder = 4 in
B_SedLaunderOrifices = 0.118967 m  # Center to center launder spacing
L_SedLaunder = 2.73944 m
# Exit Channel:
D_SedLaunderOrifice = 0.511811 in
W_ExitChannel = 0.373167 m
H_ExitChannel = 0.355898 m
L_ExitChannel = 5.07 m
H_PltWeir = 0.265898 m  # height of the weir carrying water to the distribution tank
HW_ExitChannel = 0.215898 m  # water height in exit channel from 0
# Lamella:
L_SedPlate = 0.609667 m
B_SedPlate = 2.83328 cm  # center to center distance between lamella
S_SedPlate = 2.63328 cm  # spacing between lamella
N_SedPlates = 80  # Number of Sed Plates per Sedimentation Tank Bay.
AN_SedPlate = 60 deg
V_SedC = 8.94882 m/day
L_SedActive = 2.61727 m
T
V_SedUp = 62.6554 m/day
Z_SedLaunder = 1.54533 m
H_SedPlate = 0.527987 m
H_SedAbove = 0.151317 m  # Height of water needed above the lamella
N_SedPlates = 80
HW_Sed = 1.63949 m
H_Sed = 1.73949 m
Z_Mp = 1.38359 m
H_SedBayDivider = 0.821929 m
# Flocculator: | Look at Flocculator Positioning arrays
W_FlocChannel = 0.6 m
# Fill last channel with bafffles from last channel
# Fix port width to be based on energy dissipation in that channel
ED_Floc = 6 mW/kg
# Adjust spacing after the number of baffles per channel is known.
# Check the residence time of the flocculator should be at least 20minutes
HW_FlocEnd = 1.63949 m
X_FlocBaffles = [
    0.17602, 0.17602, 0.17602, 0.28193;
    0.33404, 0.33404, 0.33404, 0.442431;
    0.49206, 0.49206, 0.49206, 0.602933;
    0.65008, 0.65008, 0.65008, 0.763434;
    0.8081, 0.8081, 0.8081, 0.923935;
    0.966119, 0.966119, 0.966119, 1.08444;
    1.12414, 1.12414, 1.12414, 1.24494;
    1.28216, 1.28216, 1.28216, 1.40544;
    1.44018, 1.44018, 1.44018, 1.56594;
    1.5982, 1.5982, 1.5982, 1.72644;
    1.75622, 1.75622, 1.75622, 1.88694;
    1.91424, 1.91424, 1.91424, 2.04744;
    2.07226, 2.07226, 2.07226, 2.20795;
    2.23028, 2.23028, 2.23028, 2.36845;
    2.3883, 2.3883, 2.3883, 2.52895;
    2.54632, 2.54632, 2.54632, 2.68945;
    2.70434, 2.70434, 2.70434, 2.84995;
    2.86236, 2.86236, 2.86236, 3.01045;
    3.02038, 3.02038, 3.02038, 3.17095;
    3.1784, 3.1784, 3.1784, 3.33146;
    3.33642, 3.33642, 3.33642, 3.49196;
    3.49444, 3.49444, 3.49444, 3.65246;
    3.65246, 3.65246, 3.65246, 0
] m
L_FlocBaffles = [
    1.48347, 1.48347, 1.48347, 1.69146;
    1.69146, 1.69146, 1.69146, 1.48347;
    1.48347, 1.48347, 1.48347, 1.69146;
    1.69146, 1.69146, 1.69146, 1.48347;
    1.48347, 1.48347, 1.48347, 1.69146;
    1.69146, 1.69146, 1.69146, 1.48347;
    1.48347, 1.48347, 1.48347, 1.69146;
    1.69146, 1.69146, 1.69146, 1.48347;
    1.48347, 1.48347, 1.48347, 1.69146;
    1.69146, 1.69146, 1.69146, 1.48347;
    1.48347, 1.48347, 1.48347, 1.69146;
    1.69146, 1.69146, 1.69146, 1.48347;
    1.48347, 1.48347, 1.48347, 1.69146;
    1.69146, 1.69146, 1.69146, 1.48347;
    1.48347, 1.48347, 1.48347, 1.69146;
    1.69146, 1.69146, 1.69146, 1.48347;
    1.48347, 1.48347, 1.48347, 1.69146;
    1.69146, 1.69146, 1.69146, 1.48347;
    1.48347, 1.48347, 1.48347, 1.69146;
    1.69146, 1.69146, 1.69146, 1.48347;
    1.48347, 1.48347, 1.48347, 1.69146;
    1.69146, 1.69146, 1.69146, 1.48347;
    1.48347, 1.48347, 1.48347, 0
] m
Z_FlocBaffles = [
    0, 0, 0, 0.158501;
    0.15602, 0.15602, 0.15602, 0;
    0, 0, 0, 0.158501;
    0.15602, 0.15602, 0.15602, 0;
    0, 0, 0, 0.158501;
    0.15602, 0.15602, 0.15602, 0;
    0, 0, 0, 0.158501;
    0.15602, 0.15602, 0.15602, 0;
    0, 0, 0, 0.158501;
    0.15602, 0.15602, 0.15602, 0;
    0, 0, 0, 0.158501;
    0.15602, 0.15602, 0.15602, 0;
    0, 0, 0, 0.158501;
    0.15602, 0.15602, 0.15602, 0;
    0, 0, 0, 0.158501;
    0.15602, 0.15602, 0.15602, 0;
    0, 0, 0, 0.158501;
    0.15602, 0.15602, 0.15602, 0;
    0, 0, 0, 0.158501;
    0.15602, 0.15602, 0.15602, 0;
    0, 0, 0, 0.158501;
    0.15602, 0.15602, 0.15602, 0;
    0, 0, 0, 0
] m
N_FlocChannels = 4
L_FlocTank = 15.3219 m
HL_Floc = 15.7988 cm
HW_FlocStart = 1.79748 m
S_FlocBaffle = [15.602; 15.602; 15.602; 15.8501] cm
B_FlocBaffle = [15.802; 15.802; 15.802; 16.0501] cm
N_FlocChannelBaffles = [23; 23; 23; 22]
W_FlocPort = [0.15602; 0.15602; 0.15602; 0.164629] m
HL_FlocChannels = [4.02152; 4.02152; 4.02152; 3.73423] cm
L_FlocBaffleLower = 1.48347 m
L_FlocBaffleUpper = 1.69146 m
H_FlocPort = [0.6; 0.6; 0.6; 0.577666] m
Ti_Floc = 20.9335 min  # residence time of the flocculator
N_FlocBaffles = 91
# Materials List:
N_Launders = 4
L_LaunderPipeTotal = 10.9578 m
N_Valves = 4
N_LaunderCouplings = 4
N_ValveCouplings = 4
N_SedPlatesTotal = 320
N_SedPlatesPerSheet = 6
N_SedPlateSheets = 54
# [reference: AutoCADMasterProgram.xmcd]
# AutoCAD References
AC_SedTank =  # error: This variable is undefined.
AC_EntranceTank =  # no stored result
AC_FlocTank = [
    "-layer m FlocTank"; "c t 132,132,132"; "FlocTank"; "  "; "_-view o t _zoom w 0.16,4.76,0 -3.99048,7.93,1.89748 _box 0,4.92,0 -3.83048,7.77,1.89748 _box 0.15,4.77,-0.15 -3.98048,7.92,1.89748 _subtract 0.15,4.77,-0.15  0,4.92,0 "; "_box -3.98048,5.52,0 0.15,5.67,1.89748"; "_box -3.98048,6.27,0 0.15,6.42,1.89748"; "_box -3.98048,7.02,0 0.15,7.17,1.89748"; "-group c FlocTank y "; "all "
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]
AC_ChemTanks = ["-layer m alumtanks"; "c t 132,132,132"; "alumtanks"; "  "; "_-view o t"; "_cylinder -0.15,8.49432,3.00313 0.4559 1.3577"; "_cylinder -0.15,8.49432,3.00813 0.4509 1.3527"; "_-view o t"; "_subtract -0.6059,8.49432,3.00313  -0.6009,8.49432,3.00313 "; "_mirror all  -0.16,7.98842 -0.14,7.98842 "; "_union all "; "-layer s 0"; "  "; "-layer f alumtanks"; "  "]
AC_DrainChannel = [
    "_-view o t"; "-layer m DrainChannel"; "c t 214,214,214"; "DrainChannel"; "  "; "3dpoly"; "-4.69835,-0.83574,-0.3"; "-4.69835,-0.83574,-0.56526"; "-4.33941,-0.83574,-0.7742"; "-3.98048,-0.83574,-0.56526"
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]
